*Heading
** Job name: Job-Cantilever1D_modes Model name: Model-1
** Generated by: Abaqus/CAE 2017
*Preprint, echo=NO, model=NO, history=NO, contact=NO
**
** PARTS
**
*Part, name=Part-Cantilever1D_modes
*End Part
**
**
** ASSEMBLY
**
*Assembly, name=Assembly
**
*Instance, name=Part-Cantilever1D_modes-1, part=Part-Cantilever1D_modes
*Node
      1,           0.,           0.
      2,  0.100000001,           0.
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*Element, type=B21
  1,   1,   2
  2,   2,   3
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*Nset, nset=Set-1, generate
   1,  101,    1
*Elset, elset=Set-1, generate
   1,  100,    1
*Nset, nset=Set-2, generate
   1,  101,    1
*Elset, elset=Set-2, generate
   1,  100,    1
** Section: Section-Cantilever1D  Profile: Profile-Cantilever1D
*Beam Section, elset=Set-1, material=Material-Cantilever1D, temperature=GRADIENTS, section=RECT
0.1, 0.1
0.,0.,-1.
*End Instance
**
*Nset, nset=Set-1, instance=Part-Cantilever1D_modes-1
 1,
*End Assembly
**
** MATERIALS
**
*Material, name=Material-Cantilever1D
*Density
2700.,
*Elastic
 7e+10, 0.3
** ----------------------------------------------------------------
**
** STEP: Step-1
**
*Step, name=Step-1, nlgeom=NO, perturbation
*Frequency, eigensolver=Lanczos, sim=NO, acoustic coupling=on, normalization=displacement
10, , , , ,
**
** BOUNDARY CONDITIONS
**
** Name: BC-fix Type: Symmetry/Antisymmetry/Encastre
*Boundary
Set-1, ENCASTRE
**
** OUTPUT REQUESTS
**
*Restart, write, frequency=0
**
** FIELD OUTPUT: F-Output-1
**
*Output, field, variable=PRESELECT
*End Step
