*Heading
** Job name: Job-RC-Column Model name: Model-1
** Generated by: Abaqus/CAE 2017
*Preprint, echo=NO, model=NO, history=NO, contact=NO
**
** PARTS
**
*Part, name=Bar
*Node
      1,           0.,           0.,           0.
      2,          40.,           0.,           0.
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*Element, type=T3D2
 1,  1,  2
 2,  2,  3
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*Nset, nset=_PickedSet2, internal, generate
  1,  51,   1
*Elset, elset=_PickedSet2, internal, generate
  1,  50,   1
** Section: Section-Stirrup
*Solid Section, elset=_PickedSet2, material=Steel
78.54,
*End Part
**
*Part, name=Concrete
*Node
      1,         300.,         300.,        2000.
      2,         300.,        262.5,        2000.
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*Element, type=C3D8R
   1,  460,  461,  470,  469,    1,    2,   11,   10
   2,  461,  462,  471,  470,    2,    3,   12,   11
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*Nset, nset=_PickedSet2, internal, generate
    1,  4131,     1
*Elset, elset=_PickedSet2, internal, generate
    1,  3200,     1
** Section: Section-Concrete
*Solid Section, elset=_PickedSet2, material=Concrete
,
*End Part
**
*Part, name=Stirrup
*Node
      1,           0.,           0.,           0.
      2,           0.,         240.,           0.
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*Element, type=T3D2
1, 2, 5
2, 5, 6
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*Nset, nset=_PickedSet2, internal, generate
  1,  24,   1
*Elset, elset=_PickedSet2, internal, generate
  1,  24,   1
** Section: Section-Stirrup
*Solid Section, elset=_PickedSet2, material=Steel
78.54,
*End Part
**
**
** ASSEMBLY
**
*Assembly, name=Assembly
**
*Instance, name=Concrete-1, part=Concrete
*End Instance
**
*Instance, name=Bar-1, part=Bar
        62.5,        237.5,        2000.
        62.5,        237.5,        2000.,         62.5,        238.5,        2000.,          90.
*End Instance
**
*Instance, name=Bar-2, part=Bar
        150.,        238.5,        2000.
        150.,        238.5,        2000.,         150.,        239.5,        2000.,          90.
*End Instance
**
*Instance, name=Bar-3, part=Bar
        62.5,         150.,        2000.
        62.5,         150.,        2000.,         62.5,         151.,        2000.,          90.
*End Instance
**
*Instance, name=Bar-4, part=Bar
        62.5,         62.5,        2000.
        62.5,         62.5,        2000.,         62.5,         63.5,        2000.,          90.
*End Instance
**
*Instance, name=Bar-5, part=Bar
        150.,         62.5,        2000.
        150.,         62.5,        2000.,         150.,         63.5,        2000.,          90.
*End Instance
**
*Instance, name=Bar-6, part=Bar
       237.5,         62.5,        2000.
       237.5,         62.5,        2000.,        237.5,         63.5,        2000.,          90.
*End Instance
**
*Instance, name=Bar-7, part=Bar
       237.5,         150.,        2000.
       237.5,         150.,        2000.,        237.5,         151.,        2000.,          90.
*End Instance
**
*Instance, name=Bar-8, part=Bar
       237.5,        237.5,        2000.
       237.5,        237.5,        2000.,        237.5,        238.5,        2000.,          90.
*End Instance
**
*Instance, name=Stirrup-1, part=Stirrup
         30.,          30.,        1950.
*End Instance
**
*Instance, name=Stirrup-1-lin-1-2, part=Stirrup
         30.,          30.,        1760.
*End Instance
**
*Instance, name=Stirrup-1-lin-1-3, part=Stirrup
         30.,          30.,        1570.
*End Instance
**
*Instance, name=Stirrup-1-lin-1-4, part=Stirrup
         30.,          30.,        1380.
*End Instance
**
*Instance, name=Stirrup-1-lin-1-5, part=Stirrup
         30.,          30.,        1190.
*End Instance
**
*Instance, name=Stirrup-1-lin-1-6, part=Stirrup
         30.,          30.,        1000.
*End Instance
**
*Instance, name=Stirrup-1-lin-1-7, part=Stirrup
         30.,          30.,         810.
*End Instance
**
*Instance, name=Stirrup-1-lin-1-8, part=Stirrup
         30.,          30.,         620.
*End Instance
**
*Instance, name=Stirrup-1-lin-1-9, part=Stirrup
         30.,          30.,         430.
*End Instance
**
*Instance, name=Stirrup-1-lin-1-10, part=Stirrup
         30.,          30.,         240.
*End Instance
**
*Instance, name=Stirrup-1-lin-1-11, part=Stirrup
         30.,          30.,          50.
*End Instance
**
*Nset, nset=RF2, instance=Concrete-1
    1,    2,    3,    4,    5,    6
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*Elset, elset=RF2, instance=Concrete-1
    1,    2,    3,    4,    5,    6
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*Nset, nset=U2, instance=Concrete-1
  459, 4123
*Nset, nset=_PickedSet52, internal, instance=Concrete-1
    1,    2,    3,    4,    5,    6
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*Elset, elset=_PickedSet52, internal, instance=Concrete-1
    1,    2,    3,    4,    5,    6
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*Nset, nset=_PickedSet57, internal, instance=Bar-1, generate
  1,  51,   1
*Nset, nset=_PickedSet57, internal, instance=Bar-2, generate
  1,  51,   1
*Nset, nset=_PickedSet57, internal, instance=Bar-3, generate
  1,  51,   1
*Nset, nset=_PickedSet57, internal, instance=Bar-7, generate
  1,  51,   1
*Nset, nset=_PickedSet57, internal, instance=Stirrup-1-lin-1-3, generate
  1,  24,   1
*Nset, nset=_PickedSet57, internal, instance=Stirrup-1-lin-1-11, generate
  1,  24,   1
*Nset, nset=_PickedSet57, internal, instance=Stirrup-1-lin-1-7, generate
  1,  24,   1
*Nset, nset=_PickedSet57, internal, instance=Bar-5, generate
  1,  51,   1
*Nset, nset=_PickedSet57, internal, instance=Stirrup-1-lin-1-5, generate
  1,  24,   1
*Nset, nset=_PickedSet57, internal, instance=Stirrup-1, generate
  1,  24,   1
*Nset, nset=_PickedSet57, internal, instance=Stirrup-1-lin-1-9, generate
  1,  24,   1
*Nset, nset=_PickedSet57, internal, instance=Bar-4, generate
  1,  51,   1
*Nset, nset=_PickedSet57, internal, instance=Bar-8, generate
  1,  51,   1
*Nset, nset=_PickedSet57, internal, instance=Stirrup-1-lin-1-4, generate
  1,  24,   1
*Nset, nset=_PickedSet57, internal, instance=Stirrup-1-lin-1-8, generate
  1,  24,   1
*Nset, nset=_PickedSet57, internal, instance=Bar-6, generate
  1,  51,   1
*Nset, nset=_PickedSet57, internal, instance=Stirrup-1-lin-1-6, generate
  1,  24,   1
*Nset, nset=_PickedSet57, internal, instance=Stirrup-1-lin-1-2, generate
  1,  24,   1
*Nset, nset=_PickedSet57, internal, instance=Stirrup-1-lin-1-10, generate
  1,  24,   1
*Elset, elset=_PickedSet57, internal, instance=Bar-1, generate
  1,  50,   1
*Elset, elset=_PickedSet57, internal, instance=Bar-2, generate
  1,  50,   1
*Elset, elset=_PickedSet57, internal, instance=Bar-3, generate
  1,  50,   1
*Elset, elset=_PickedSet57, internal, instance=Bar-7, generate
  1,  50,   1
*Elset, elset=_PickedSet57, internal, instance=Stirrup-1-lin-1-3, generate
  1,  24,   1
*Elset, elset=_PickedSet57, internal, instance=Stirrup-1-lin-1-11, generate
  1,  24,   1
*Elset, elset=_PickedSet57, internal, instance=Stirrup-1-lin-1-7, generate
  1,  24,   1
*Elset, elset=_PickedSet57, internal, instance=Bar-5, generate
  1,  50,   1
*Elset, elset=_PickedSet57, internal, instance=Stirrup-1-lin-1-5, generate
  1,  24,   1
*Elset, elset=_PickedSet57, internal, instance=Stirrup-1, generate
  1,  24,   1
*Elset, elset=_PickedSet57, internal, instance=Stirrup-1-lin-1-9, generate
  1,  24,   1
*Elset, elset=_PickedSet57, internal, instance=Bar-4, generate
  1,  50,   1
*Elset, elset=_PickedSet57, internal, instance=Bar-8, generate
  1,  50,   1
*Elset, elset=_PickedSet57, internal, instance=Stirrup-1-lin-1-4, generate
  1,  24,   1
*Elset, elset=_PickedSet57, internal, instance=Stirrup-1-lin-1-8, generate
  1,  24,   1
*Elset, elset=_PickedSet57, internal, instance=Bar-6, generate
  1,  50,   1
*Elset, elset=_PickedSet57, internal, instance=Stirrup-1-lin-1-6, generate
  1,  24,   1
*Elset, elset=_PickedSet57, internal, instance=Stirrup-1-lin-1-2, generate
  1,  24,   1
*Elset, elset=_PickedSet57, internal, instance=Stirrup-1-lin-1-10, generate
  1,  24,   1
*Nset, nset=_PickedSet58, internal, instance=Concrete-1, generate
    1,  4131,     1
*Elset, elset=_PickedSet58, internal, instance=Concrete-1, generate
    1,  3200,     1
*Nset, nset=_PickedSet59, internal, instance=Concrete-1
  451,  452,  453,  454,  455,  456
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*Elset, elset=_PickedSet59, internal, instance=Concrete-1
  393,  394,  395,  396,  397,  398
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*Elset, elset=__PickedSurf53_S5, internal, instance=Concrete-1
  393,  394,  395,  396,  397,  398
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*Surface, type=ELEMENT, name=_PickedSurf53, internal
__PickedSurf53_S5, S5
** Constraint: Constraint-1
*Embedded Element, host elset=_PickedSet58
_PickedSet57
*End Assembly
**
** MATERIALS
**
*Material, name=Concrete
*Density
 2.4e+06,
*Elastic
17585., 0.17
*Concrete Damaged Plasticity
 30.5,   0.1,  1.16, 0.666, 0.001
*Concrete Compression Hardening
 5.23363,          0.
 6.27766,       8e-05
 7.21148,  0.00011756
 8.03782, 0.000162279
 8.76131, 0.000213877
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 2.21961,  0.00795151
*Concrete Tension Stiffening
  1.16,          0.
  1.08,     3.6e-05
 0.975, 0.000140293
 0.905, 0.000244566
  0.84, 0.000348534
  0.78, 0.000452218
 0.724, 0.000555638
 0.672, 0.000658814
 0.624, 0.000761762
  0.58, 0.000864499
 0.538,  0.00096704
   0.5,   0.0010694
 0.464,  0.00117159
 0.431,  0.00127362
   0.4,  0.00137551
 0.366,  0.00147816
 0.332,  0.00158035
 0.299,  0.00168254
 0.266,  0.00178474
 0.232,  0.00188693
 0.199,  0.00198912
 0.166,  0.00209131
 0.132,   0.0021935
 0.099,  0.00229569
 0.066,  0.00239788
 0.032,  0.00250007
*Material, name=Steel
*Density
 7.8e-06,
*Elastic
200000., 0.3
*Plastic
280.,  0.
370., 0.1
**
** BOUNDARY CONDITIONS
**
** Name: BC-1 Type: Displacement/Rotation
*Boundary
_PickedSet52, 1, 1
_PickedSet52, 2, 2
_PickedSet52, 3, 3
_PickedSet52, 4, 4
_PickedSet52, 5, 5
_PickedSet52, 6, 6
** ----------------------------------------------------------------
**
** STEP: Step-1
**
*Step, name=Step-1, nlgeom=YES, inc=1000
*Static
0.01, 1., 1e-05, 0.1
**
** LOADS
**
** Name: Load-1   Type: Pressure
*Dsload
_PickedSurf53, P, 3.
**
** OUTPUT REQUESTS
**
*Restart, write, frequency=0
**
** FIELD OUTPUT: F-Output-1
**
*Output, field, variable=PRESELECT
**
** HISTORY OUTPUT: H-Output-1
**
*Output, history, variable=PRESELECT
*End Step
** ----------------------------------------------------------------
**
** STEP: Step-2
**
*Step, name=Step-2, nlgeom=YES, inc=1000
*Static
0.01, 1., 1e-05, 0.1
**
** BOUNDARY CONDITIONS
**
** Name: BC-2 Type: Displacement/Rotation
*Boundary
_PickedSet59, 2, 2, -200.
**
** OUTPUT REQUESTS
**
*Restart, write, frequency=0
**
** FIELD OUTPUT: F-Output-1
**
*Output, field, variable=PRESELECT
**
** HISTORY OUTPUT: RF2
**
*Output, history
*Node Output, nset=RF2
RF2,
**
** HISTORY OUTPUT: U2
**
*Node Output, nset=U2
U2,
**
** HISTORY OUTPUT: H-Output-1
**
*Output, history, variable=PRESELECT
*End Step
