*Heading
** Job name: Job-CantileverTransient Model name: Model-1
** Generated by: Abaqus/CAE 2017
*Preprint, echo=NO, model=NO, history=NO, contact=NO
**
** PARTS
**
*Part, name=Part-Cantilever3D
*Node
      1,          -5.,          -5.,         200.
      2,          -5.,         -2.5,         200.
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*Element, type=C3D8R
   1,  406,  407,  412,  411,    1,    2,    7,    6
   2,  407,  408,  413,  412,    2,    3,    8,    7
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*Nset, nset=_PickedSet2, internal, generate
    1,  2025,     1
*Elset, elset=_PickedSet2, internal, generate
    1,  1280,     1
** Section: Section-Solid
*Solid Section, elset=_PickedSet2, material=Material-Steel
,
*End Part
**
**
** ASSEMBLY
**
*Assembly, name=Assembly
**
*Instance, name=Part-Cantilever3D-1, part=Part-Cantilever3D
*End Instance
**
*Instance, name=Part-Cantilever3D-2, part=Part-Cantilever3D
*End Instance
**
*Node
      1,           0.,           0.,         220.
*Nset, nset=_PickedSet8, internal
 1,
*Nset, nset=_PickedSet9, internal
 1,
*Nset, nset=_PickedSet10, internal
 1,
*Nset, nset=_PickedSet11, internal, instance=Part-Cantilever3D-2
  401,  402,  403,  404,  405,  806
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*Elset, elset=_PickedSet11, internal, instance=Part-Cantilever3D-2
  317,  318,  319,  320,  637,  638,  639,  640,  957,  958,  959,  960, 1277, 1278, 1279, 1280
*Elset, elset=__PickedSurf7_S3, internal, instance=Part-Cantilever3D-2
   1,   2,   3,   4, 321, 322, 323, 324, 641, 642, 643, 644, 961, 962, 963, 964
*Surface, type=ELEMENT, name=_PickedSurf7, internal
__PickedSurf7_S3, S3
** Constraint: Constraint-MPC
*Coupling, constraint name=Constraint-MPC, ref node=_PickedSet8, surface=_PickedSurf7
*Kinematic
*End Assembly
*Amplitude, name=Amp-Transient
             0.,              0.,              1.,            100.,              2.,           -200.,              3.,           -400.
             4.,              0.,              5.,            150.,              6.,            125.,              7.,            -50.
             8.,             60.,              9.,            -54.,             10.,             90.
**
** MATERIALS
**
*Material, name=Material-Steel
*Elastic
200000., 0.3
**
** BOUNDARY CONDITIONS
**
** Name: BC-Fix Type: Displacement/Rotation
*Boundary
_PickedSet11, 1, 1
_PickedSet11, 2, 2
_PickedSet11, 3, 3
_PickedSet11, 4, 4
_PickedSet11, 5, 5
_PickedSet11, 6, 6
** Name: BC-MPC Type: Displacement/Rotation
*Boundary
_PickedSet10, 1, 1
_PickedSet10, 3, 3
_PickedSet10, 4, 4
_PickedSet10, 5, 5
_PickedSet10, 6, 6
** ----------------------------------------------------------------
**
** STEP: Step-Transient
**
*Step, name=Step-Transient, nlgeom=NO
*Static
1., 10., 0.0001, 10.
**
** LOADS
**
** Name: Load-Transient   Type: Concentrated force
*Cload, amplitude=Amp-Transient
_PickedSet9, 2, 1.
**
** OUTPUT REQUESTS
**
*Restart, write, frequency=0
**
** FIELD OUTPUT: F-Output-1
**
*Output, field, variable=PRESELECT
**
** HISTORY OUTPUT: H-Output-1
**
*Output, history, variable=PRESELECT
*End Step
