*Heading
** Job name: Job-2 Model name: Model-1
** Generated by: Abaqus/CAE 2017
*Preprint, echo=NO, model=NO, history=NO, contact=NO
**
** PARTS
**
*Part, name=Part-1
*Node
      1,         150.,          30.
      2,         150.,           0.
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*Element, type=CPE4
 1,  1,  9, 36,  4
 2,  9, 10, 35, 36
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*Element, type=CPE4R
 31,   6,  50, 163, 162
 32,  50,  49, 164, 163
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*Nset, nset=Set-1, generate
   1,  848,    1
*Elset, elset=Set-1, generate
   1,  780,    1
** Section: Section-1
*Solid Section, elset=Set-1, material=Material-1
,
*End Part
**
**
** ASSEMBLY
**
*Assembly, name=Assembly
**
*Instance, name=Part-1-1, part=Part-1
*End Instance
**
*Nset, nset=Set-1, instance=Part-1-1
   2,   5,  65,  66,  67,  68
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*Elset, elset=Set-1, instance=Part-1-1, generate
  45,  780,   15
*Nset, nset=Set-2, instance=Part-1-1
   2,   5,  65,  66,  67,  68
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*Elset, elset=Set-2, instance=Part-1-1, generate
  45,  780,   15
*End Assembly
*Amplitude, name=Amp-1
             0.,              0.,            0.02,          0.0052,            0.04,          0.0042,            0.06,          0.0032
           0.08,          0.0023,             0.1,          0.0017,            0.12,          0.0045,            0.14,          0.0073
           0.16,          0.0071,            0.18,          0.0047,             0.2,          0.0022,            0.22,         -0.0003
           0.24,          0.0048,            0.26,            0.01,            0.28,          0.0143,             0.3,          0.0111
           0.32,          0.0079,            0.34,          0.0046,            0.36,          0.0014,            0.38,         -0.0018
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            80.,              0.
**
** MATERIALS
**
*Material, name=Material-1
*Damping, alpha=1.36591, beta=0.00125
*Density
1500.,
*Elastic
 6e+07, 0.3
**
** BOUNDARY CONDITIONS
**
** Name: BC-1 Type: Displacement/Rotation
*Boundary
Set-1, 1, 1
Set-1, 2, 2
Set-1, 6, 6
** ----------------------------------------------------------------
**
** STEP: Step-1
**
*Step, name=Step-1, nlgeom=NO, inc=2000
*Dynamic
0.02,40.,0.0004
**
** BOUNDARY CONDITIONS
**
** Name: BC-1 Type: Displacement/Rotation
*Boundary, op=NEW
Set-1, 2, 2
Set-1, 6, 6
** Name: BC-2 Type: Acceleration/Angular acceleration
*Boundary, op=NEW, amplitude=Amp-1, type=ACCELERATION
Set-2, 1, 1, 9.81
**
** OUTPUT REQUESTS
**
*Restart, write, frequency=0
**
** FIELD OUTPUT: F-Output-1
**
*Output, field, time interval=0.02
*Node Output
A, AR, AT, U, UR, UT, V, VR
VT
**
** HISTORY OUTPUT: H-Output-1
**
*Output, history, time interval=0.02
*Element Output
IRA1, IRA2, IRA3, IRAR1, IRAR2, IRAR3
*Modal Output
GA, GV
*End Step
