*Heading
** Job name: Job-1 Model name: Model-1
** Generated by: Abaqus/CAE 2017
*Preprint, echo=NO, model=NO, history=NO, contact=NO
**
** PARTS
**
*Part, name=Part-1
*Node
      1,           0.,           0.
      2,           2.,           0.
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*Element, type=CPE4R
  1,   1,   2,  53,  52
  2,   2,   3,  54,  53
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*Nset, nset=Set-1, generate
   1,  816,    1
*Elset, elset=Set-1, generate
   1,  750,    1
** Section: Section-1
*Solid Section, elset=Set-1, material=Material-1
1.,
*End Part
**
**
** ASSEMBLY
**
*Assembly, name=Assembly
**
*Instance, name=Part-1-1, part=Part-1
*End Instance
**
*Nset, nset=Set-1, instance=Part-1-1, generate
  1,  51,   1
*Elset, elset=Set-1, instance=Part-1-1, generate
  1,  50,   1
*Nset, nset=Set-2, instance=Part-1-1, generate
  1,  51,   1
*Elset, elset=Set-2, instance=Part-1-1, generate
  1,  50,   1
*Elset, elset=_m_Surf-1_S4, internal, instance=Part-1-1, generate
   1,  701,   50
*Surface, type=ELEMENT, name=m_Surf-1
_m_Surf-1_S4, S4
*Elset, elset=_s_Surf-1_S2, internal, instance=Part-1-1, generate
  50,  750,   50
*Surface, type=ELEMENT, name=s_Surf-1
_s_Surf-1_S2, S2
** Constraint: Constraint-1
*Tie, name=Constraint-1, adjust=yes
s_Surf-1, m_Surf-1
*End Assembly
*Amplitude, name=Amp-1
             0.,              0.,            0.02,          0.0052,            0.04,          0.0042,            0.06,          0.0032
           0.08,          0.0023,             0.1,          0.0017,            0.12,          0.0045,            0.14,          0.0073
           0.16,          0.0071,            0.18,          0.0047,             0.2,          0.0022,            0.22,         -0.0003
           0.24,          0.0048,            0.26,            0.01,            0.28,          0.0143,             0.3,          0.0111
           0.32,          0.0079,            0.34,          0.0046,            0.36,          0.0014,            0.38,         -0.0018
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            80.,              0.
**
** MATERIALS
**
*Material, name=Material-1
*Damping, alpha=1.36591, beta=0.00125
*Density
1500.,
*Elastic
 6e+07, 0.3
**
** BOUNDARY CONDITIONS
**
** Name: BC-1 Type: Displacement/Rotation
*Boundary
Set-1, 1, 1
Set-1, 2, 2
Set-1, 6, 6
** ----------------------------------------------------------------
**
** STEP: Step-1
**
*Step, name=Step-1, nlgeom=NO, inc=2000
*Dynamic
0.02,40.,0.0004
**
** BOUNDARY CONDITIONS
**
** Name: BC-1 Type: Displacement/Rotation
*Boundary, op=NEW
Set-1, 2, 2
Set-1, 6, 6
** Name: BC-2 Type: Acceleration/Angular acceleration
*Boundary, op=NEW, amplitude=Amp-1, type=ACCELERATION
Set-2, 1, 1, 9.81
**
** OUTPUT REQUESTS
**
*Restart, write, frequency=0
**
** FIELD OUTPUT: F-Output-1
**
*Output, field, time interval=0.02
*Node Output
A, AR, AT, CF, RF, RM, RT, TF
U, UR, UT, V, VF, VR, VT
*Element Output, directions=YES
ALPHA, ALPHAN, BF, CENTMAG, CENTRIFMAG, CORIOMAG, CS11, CTSHR, ESF1, GRAV, HP, MISES, MISESMAX, MISESONLY, NFORC, NFORCSO
P, PRESSONLY, PS, ROTAMAG, S, SF, SSAVG, TRIAX, TRNOR, TRSHR, TSHR, VS
**
** HISTORY OUTPUT: H-Output-1
**
*Output, history, time interval=0.02
*Element Output
IRA1, IRA2, IRA3, IRAR1, IRAR2, IRAR3, IRF1, IRF2, IRF3, IRM1, IRM2, IRM3
*Modal Output
GA, GV
*Energy Output
ALLAE, ALLCD, ALLDMD, ALLEE, ALLFD, ALLIE, ALLJD, ALLKE, ALLKL, ALLPD, ALLQB, ALLSD, ALLSE, ALLVD, ALLWK, ETOTAL
*End Step
