*Heading
** Job name: Job-1 Model name: Model-1
** Generated by: Abaqus/CAE 2017
*Preprint, echo=NO, model=NO, history=NO, contact=NO
**
** PARTS
**
*Part, name=Pipe
*Node
      1,           0.,           6.
      2,  0.324833453,   5.99120045
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*Element, type=CPE4R
  1,   1,   2,  32,  31
  2,   2,   3,  33,  32
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*Nset, nset=_PickedSet2, internal, generate
   1,  390,    1
*Elset, elset=_PickedSet2, internal, generate
   1,  348,    1
** Section: Section-1
*Solid Section, elset=_PickedSet2, material=Steel
,
*End Part
**
**
** ASSEMBLY
**
*Assembly, name=Assembly
**
*Instance, name=Pipe-1, part=Pipe
*End Instance
**
*Nset, nset=_PickedSet5, internal, instance=Pipe-1, generate
  30,  390,   30
*Elset, elset=_PickedSet5, internal, instance=Pipe-1, generate
  29,  348,   29
*Nset, nset=_PickedSet6, internal, instance=Pipe-1, generate
   1,  361,   30
*Elset, elset=_PickedSet6, internal, instance=Pipe-1, generate
   1,  320,   29
*Elset, elset=__PickedSurf4_S1, internal, instance=Pipe-1, generate
  1,  29,   1
*Surface, type=ELEMENT, name=_PickedSurf4, internal
__PickedSurf4_S1, S1
*End Assembly
**
** MATERIALS
**
*Material, name=Steel
*Elastic
210000., 0.3
** ----------------------------------------------------------------
**
** STEP: Step-1
**
*Step, name=Step-1, nlgeom=NO
*Static
0.1, 1., 1e-05, 1.
**
** BOUNDARY CONDITIONS
**
** Name: BC-1 Type: Symmetry/Antisymmetry/Encastre
*Boundary
_PickedSet5, YSYMM
** Name: BC-2 Type: Symmetry/Antisymmetry/Encastre
*Boundary
_PickedSet6, XSYMM
**
** LOADS
**
** Name: Load-1   Type: Pressure
*Dsload
_PickedSurf4, P, 15.
**
** OUTPUT REQUESTS
**
*Restart, write, frequency=0
**
** FIELD OUTPUT: F-Output-1
**
*Output, field, variable=PRESELECT
**
** HISTORY OUTPUT: H-Output-1
**
*Output, history, variable=PRESELECT
*End Step
